<?xml version="1.0"?>
<rocket_engine name="sparklebug-stardrive">
    <!-- TODO: nerf back to 30000 and use 2-3 engines -->
    <isp>60000</isp>
    <maxthrottle>1.00</maxthrottle>
    <minthrottle>0.60</minthrottle>
    <sloxiflowmax>11.91</sloxiflowmax>
    <slfuelflowmax>7.23</slfuelflowmax>
</rocket_engine>
