<?xml version="1.0"?>
<flight_control name="FCS: Sparklebug">
    <channel name="Landing Gear">
        <kinematic name="Gear Control">
            <input>gear/gear-cmd-norm</input>
            <traverse>
                <setting>
                    <position>0</position>
                    <time>0</time>
                </setting>
                <setting>
                    <position>1</position>
                    <time>5</time>
                </setting>
            </traverse>
            <output>gear/gear-pos-norm</output>
        </kinematic>
    </channel>

    <channel name="Throttles">
    </channel>

    <channel name="Stardrive">
        <!-- reverse thruster (pointing forward) -->
        <pure_gain name="fcs/throttle-pos-norm[2]">
            <input>/fcs/stardrive/throttle</input>
            <!-- neutered for now -->
            <gain>-1</gain>
            <clipto>
                <min>0</min>
                <max>1</max>
            </clipto>
            <output>fcs/throttle-pos-norm[2]</output>
        </pure_gain>
        <!-- tail thruster (pointing astern) -->
        <pure_gain name="fcs/throttle-pos-norm[3]">
            <input>/fcs/stardrive/throttle</input>
            <!-- neutered for now -->
            <gain>1</gain>
            <clipto>
                <min>0</min>
                <max>1</max>
            </clipto>
            <output>fcs/throttle-pos-norm[3]</output>
        </pure_gain>
    </channel>

    <channel name="RCS">
        <!-- yaw axis -->
        <pure_gain name="fcs/throttle-pos-norm[4]">
            <input>/fcs/rudder</input>
            <gain>-1</gain>
            <clipto>
                <min>0</min>
                <max>1</max>
            </clipto>
            <output>fcs/throttle-pos-norm[4]</output>
        </pure_gain>

        <pure_gain name="fcs/throttle-pos-norm[5]">
            <input>/fcs/rudder</input>
            <gain>1</gain>
            <clipto>
                <min>0</min>
                <max>1</max>
            </clipto>
            <output>fcs/throttle-pos-norm[5]</output>
        </pure_gain>

        <pure_gain name="fcs/throttle-pos-norm[6]">
            <input>/fcs/rudder</input>
            <gain>1</gain>
            <clipto>
                <min>0</min>
                <max>1</max>
            </clipto>
            <output>fcs/throttle-pos-norm[6]</output>
        </pure_gain>

        <pure_gain name="fcs/throttle-pos-norm[7]">
            <input>/fcs/rudder</input>
            <gain>-1</gain>
            <clipto>
                <min>0</min>
                <max>1</max>
            </clipto>
            <output>fcs/throttle-pos-norm[7]</output>
        </pure_gain>

        <!-- pitch axis -->
        <pure_gain name="fcs/throttle-pos-norm[8]">
            <input>/fcs/elevator</input>
            <gain>-1</gain>
            <clipto>
                <min>0</min>
                <max>1</max>
            </clipto>
            <output>fcs/throttle-pos-norm[8]</output>
        </pure_gain>

        <pure_gain name="fcs/throttle-pos-norm[9]">
            <input>/fcs/elevator</input>
            <gain>1</gain>
            <clipto>
                <min>0</min>
                <max>1</max>
            </clipto>
            <output>fcs/throttle-pos-norm[9]</output>
        </pure_gain>

        <pure_gain name="fcs/throttle-pos-norm[10]">
            <input>/fcs/elevator</input>
            <gain>1</gain>
            <clipto>
                <min>0</min>
                <max>1</max>
            </clipto>
            <output>fcs/throttle-pos-norm[10]</output>
        </pure_gain>

        <pure_gain name="fcs/throttle-pos-norm[11]">
            <input>/fcs/elevator</input>
            <gain>-1</gain>
            <clipto>
                <min>0</min>
                <max>1</max>
            </clipto>
            <output>fcs/throttle-pos-norm[11]</output>
        </pure_gain>

        <!-- bank axis -->
        <pure_gain name="fcs/throttle-pos-norm[12]">
            <input>/fcs/aileron</input>
            <gain>-0.5</gain>
            <clipto>
                <min>0</min>
                <max>1</max>
            </clipto>
            <output>fcs/throttle-pos-norm[12]</output>
        </pure_gain>

        <pure_gain name="fcs/throttle-pos-norm[13]">
            <input>/fcs/aileron</input>
            <gain>0.5</gain>
            <clipto>
                <min>0</min>
                <max>1</max>
            </clipto>
            <output>fcs/throttle-pos-norm[13]</output>
        </pure_gain>

        <pure_gain name="fcs/throttle-pos-norm[14]">
            <input>/fcs/aileron</input>
            <gain>0.5</gain>
            <clipto>
                <min>0</min>
                <max>1</max>
            </clipto>
            <output>fcs/throttle-pos-norm[14]</output>
        </pure_gain>

        <pure_gain name="fcs/throttle-pos-norm[15]">
            <input>/fcs/aileron</input>
            <gain>-0.5</gain>
            <clipto>
                <min>0</min>
                <max>1</max>
            </clipto>
            <output>fcs/throttle-pos-norm[15]</output>
        </pure_gain>

    </channel>
</flight_control>
